units metal
dimension 3
boundary p p p
atom_style atomic
read_data structure.inp
include potential.inp
fix ensemble all nve
variable dumptime equal 100
variable thermotime equal 100
dump 1 all custom ${dumptime} dump.out id type xsu ysu zsu fx fy fz vx vy vz
dump_modify 1 sort id format line "%d %d %20.15g %20.15g %20.15g %20.15g %20.15g %20.15g %20.15g %20.15g %20.15g"
thermo_style custom step temp pe etotal pxx pxy pxz pyy pyz pzz vol
thermo_modify format float %20.15g
thermo ${thermotime}
run 0
